// COMSOL Multiphysics 5.0.1.276 model "2D-Cloak.mph"
// 2D Cloak
// Outline of the model tree

Parameters
  Bext = 500[mT]  // External/backgroud magnetic flux density.
  mu_FM_perc = 100  // Ferromagnet permiability as a percentage of its "ideal" value.
  gap = R2-0.5*1.023[in]  // Air gap between superconductor and ferromagnet.
  L0 = 0.5*(0.6142+0.6190)[in]  // Length of inner arc of superconductor.
  S0 = 0.253[in]  // Sagitta of inner arc of superconductor.
  L1 = 2*(R2-gap)  // Length of outer arc of superconductor.
  S1 = 0.507[in]  // Sagitta of outer arc of superconductor.
  mu_SC = 0.001  // Relative permiability of superconductor.
  R2 = 0.5*1.085[in]  // Inner radius of ferromagnet.
  R3 = 0.5*1.620[in]  // Outer radius of ferromagnet.
  Rworld = 12[in]  // Radius of world area.
  plot_delta = 1[mm]  // Buffer distance to prevent inclusion of infinite element domain in plots.
  R0 = (S0^2+(L0/2)^2)/(2*S0)  // Inner radius of superconductor.
  R1 = (S1^2+(L1/2)^2)/(2*S1)  // Outer radius of superconductor.
  offset0 = R0-S0  // Offset of inner surface of superconductor.
  offset1 = R1-S1  // Offset of outer surface of superconductor.
  Rworld_plot = Rworld-plot_delta  // World radius minus buffer distance for plots.
  mu_FM = mu_FM_ideal*mu_FM_perc/100  // Relative permiability of ferromagnet.
  mu_FM_ideal = (R3^2+R2^2)/(R3^2-R2^2)  // "Ideal" relative permiability of ferromagnet.

Selections
  sel1: Explicit "Infinite Element Domain" on domains 5
  com1: Complement "Analysis Domain" | input = {sel1}

Coordinate systems
  ie1: InfiniteElement "Infinite Element Domain 1" on domains 5 | ScalingType = Cylindrical

Geometry
  geom1 "Geometry 1" (2D, length unit mm)
    c1: Circle "SC Inner" | pos = {0, -offset0}; r = R0
    c2: Circle "SC Outter" | pos = {0, -offset1}; r = R1
    sq1: Square | pos = {0, -2*R1}; type = solid; base = center; size = 4*R1
    dif2: Difference "SC" | contributeto = csel1; input = c2; input2 = c1, sq1
    mir1: Mirror | input = dif2; keep = on; axis = {0, 1}
    c6: Circle "FM Inner" | r = R2
    c3: Circle "FM Outter" | r = R3
    dif1: Difference "FM" | contributeto = csel2; input = c3; input2 = c6
    c4: Circle "World" | r = Rworld
    c5: Circle "Infinite Element Domain" | r = 2*Rworld
    pol1: Polygon
      x = range(-Rworld/sqrt(2),(Rworld/sqrt(2)-(-Rworld/sqrt(2)))/1,Rworld/sqrt(2))
      y = -Rworld/sqrt(2)*1^range(1,2)
    fin: Finalize "Form Union"

Materials
  mat1: Common "Air" on all domains
    def "Basic"
      relpermeability = 1
      relpermittivity = 1
      dynamicviscosity = eta(T[1/K])[Pa*s]
      ratioofspecificheat = 1.4
      electricconductivity = 0[S/m]
      heatcapacity = Cp(T[1/K])[J/(kg*K)]
      density = rho(pA[1/Pa],T[1/K])[kg/m^3]
      thermalconductivity = k(T[1/K])[W/(m*K)]
      soundspeed = cs(T[1/K])[m/s]
      eta: Piecewise | arg = T; extrap = constant; pieces = {200.0, 1600.0, -8.38278E-7+8.35717342E-8*T^1-7.69429583E-11*T^2+4.6437266E-14*T^3-1.06585607E-17*T^4}
      Cp: Piecewise | arg = T; extrap = constant; pieces = {200.0, 1600.0, 1047.63657-0.372589265*T^1+9.45304214E-4*T^2-6.02409443E-7*T^3+1.2858961E-10*T^4}
      rho: Analytic | expr = pA*0.02897/8.314/T; args = {pA, T}; dermethod = manual; argders = {{pA, d(pA*0.02897/8.314/T,pA)}, {T, d(pA*0.02897/8.314/T,T)}}
      k: Piecewise | arg = T; extrap = constant; pieces = {200.0, 1600.0, -0.00227583562+1.15480022E-4*T^1-7.90252856E-8*T^2+4.11702505E-11*T^3-7.43864331E-15*T^4}
      cs: Analytic | expr = sqrt(1.4*287*T); args = T; dermethod = manual; argders = {T, d(sqrt(1.4*287*T),T)}
    RefractiveIndex
      n = 1
      ki = 0
  mat2: Common "Superconductor (from Copper)" on selection geom1_csel1_dom
    def "Basic"
      relpermeability = mu_SC
      electricconductivity = 5.998e7[S/m]
      heatcapacity = 385[J/(kg*K)]
      relpermittivity = 1
      emissivity = 0.5
      density = 8700[kg/m^3]
      thermalconductivity = 400[W/(m*K)]
    linzRes "Linearized resistivity"
      rho0 = 1.72e-8[ohm*m]
      alpha = 3.9e-3[1/K]
      Tref = 273.15[K]
  mat3: Common "Ferromagnet (from Iron)" on selection geom1_csel2_dom
    def "Basic"
      relpermeability = mu_FM
      electricconductivity = 1.12e7[S/m]
      thermalexpansioncoefficient = 12.2e-6[1/K]
      heatcapacity = 440[J/(kg*K)]
      relpermittivity = 1
      density = 7870[kg/m^3]
      thermalconductivity = 76.2[W/(m*K)]
    Enu "Young's modulus and Poisson's ratio"
      youngsmodulus = 200e9[Pa]
      poissonsratio = 0.29

Physics
  mfnc: MagnetostaticsNoCurrents "Magnetic Fields, No Currents" on all domains
    dependent variable Vm
    BackgroundField.SolveFor = ReducedField
    BackgroundField.Hb = {0, Bext/mu0_const, 0}
    mfc1: MagneticFluxConservation (default)
    mi1: MagneticInsulation (default)
    init1: init "Initial Values 1" (default)
    zsp1: ZeroMagneticScalarPotential on points 9

Mesh
  mesh1 "Mesh 1" (physics-controlled)
    size: MeshSizeDefault | hauto = 2

Studies
  std1 "Study 1"
    stat: Stationary

Solver configurations
  sol1 "Solution 1" (study std1)
    v1: Variables "Dependent Variables 1"
    s1: Stationary "Stationary Solver 1"
      dDef: Direct
      fc1: FullyCoupled | linsolver = dDef

Datasets
  dset1: Solution | solution = sol1
  cln1: CutLine2D "Cut Line 2D x Center"
    data = dset1
    method = twopoint
    genpoints = {{-Rworld_plot, 0}, {Rworld_plot, 0}}
  cln2: CutLine2D "Cut Line 2D y Center" | data = dset1; genpoints = {{0, -Rworld_plot}, {0, Rworld_plot}}
  cln3: CutLine2D "Cut Line 2D x FM Edge"
    data = dset1
    genpoints = {{-sqrt(Rworld_plot^2-R3^2), -R3}, {sqrt(Rworld_plot^2-R3^2), -R3}}
  cln4: CutLine2D "Cut Line 2D y FM Edge"
    data = dset1
    genpoints = {{-R3, -sqrt(Rworld_plot^2-R3^2)}, {-R3, sqrt(Rworld_plot^2-R3^2)}}
  cln8: CutLine2D "Cut Line 2D x FM Edge and Past Set"
    data = dset1
    genpoints = {{-Rworld/2, -R3}, {Rworld/2, -R3}}
    genparadist = range(-5[mm],(-50[mm]-(-5[mm]))/9,-50[mm])

Derived values
  pev2: EvalPoint "By (Edge)" on points 10 | data = dset1; table = tbl1; expr = mfnc.By; unit = mT; descr = By
  pev3: EvalPoint "By Deviation (Edge)" on points 10
    data = dset1
    table = tbl1
    expr = (mfnc.By-Bext)/Bext*100
    unit = 1
    descr = By Deviation (%)
  int1: IntSurface "By Distortion (Wb), External" on domains 1, 2
    data = dset1
    table = tbl2
    expr = (mfnc.By-Bext)
    unit = Wb
    descr = By Distortion Integral
  int2: IntSurface "Relative By Distortion, External" on domains 1, 2
    data = dset1
    table = tbl2
    expr = (mfnc.By-Bext)/Bext
    unit = m^2
    descr = Relative By Distortion Integral
  max1: MaxSurface "Max By, External" on domains 1, 2
    data = dset1
    table = tbl2
    expr = mfnc.By
    unit = mT
    descr = Max External By
  min1: MinSurface "Min By, External" on domains 1, 2
    data = dset1
    table = tbl2
    expr = mfnc.By
    unit = mT
    descr = Min External By
  int3: IntSurface "By Leakage (Wb)" on domains 8
    data = dset1
    table = tbl3
    expr = mfnc.By
    unit = Wb
    descr = By Distortion Integral
  int4: IntSurface "Relative By Leakage" on domains 8
    data = dset1
    table = tbl3
    expr = mfnc.By/Bext
    unit = m^2
    descr = Relative By Distortion Integral
  max2: MaxSurface "Max By, Internal" on domains 8
    data = dset1
    table = tbl3
    expr = mfnc.By
    unit = mT
    descr = Max Internal By
  min2: MinSurface "Min By, Internal" on domains 8
    data = dset1
    table = tbl3
    expr = mfnc.By
    unit = mT
    descr = Min Internal By

Tables
  tbl2: Table "Cloak Performance"
    // By Distortion (Wb), External ((mfnc.By-Bext))
    By Distortion Integral (Wb) | Relative By Distortion Integral (m^2) | Max External By (mT) | Min External By (mT)
    -2.70236e-10 | -5.40473e-10 | 512.015 | 493.032
  tbl3: Table "Shield Performance"
    // By Leakage (Wb) (mfnc.By)
    By Distortion Integral (Wb) | Relative By Distortion Integral (m^2) | Max Internal By (mT) | Min Internal By (mT)
    1.57635e-07 | 3.15271e-07 | 1.8424 | 1.33209
  tbl1: Table "Single Point Cloak Performance"
    // By (Edge) (mfnc.By)
    By (mT), Point: 10 | By Deviation (%) (1), Point: 10
    513.879 | 2.77583

Plots
  pg7: PlotGroup2D "|B| streamline" | data = dset1
    surf1: Surface | expr = mfnc.normB; unit = mT
    str1: Streamline on boundaries 1 | expr = {mfnc.Bx, mfnc.By}; selnumber = 100; madv = manual; mseed = {R0, -Rworld}
  pg9: PlotGroup1D "By vs. x (Edge and Past)" | data = dset1
    lngr2: LineGraph "Edge"
      data = cln8
      inputmode = linesecond
      cutmode = off
      listen = on
      expr = mfnc.By
      unit = mT
      xdata = expr
      xdataexpr = x